*Heading
** Job name: Job-DB0-3040el Model name: Model-3040-0deg
** Generated by: Abaqus/CAE 2019
*Preprint, echo=NO, model=NO, history=NO, contact=NO
**
** PARTS
*Include, INPUT=Param.inp
**
*Parameter
E1=181611
E2=0.30
**
*Part, name=Part-1
*End Part
**
**
** ASSEMBLY
**
*Assembly, name=Assembly
**
*Instance, name=Part-1-1, part=Part-1
*Node
      1,           0.,          80.
      2,           0.,   78.9142838
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*Element, type=CPS4R
   1,    1,    2,   83,   82
   2,    2,    3,   84,   83
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*Nset, nset=Set-1, generate
    1,  3159,     1
*Elset, elset=Set-1, generate
    1,  3040,     1
*Nset, nset=Set-2, generate
    1,  3159,     1
*Elset, elset=Set-2, generate
    1,  3040,     1
*Nset, nset=Set-3, generate
    1,  3079,    81
*Elset, elset=Set-3, generate
    1,  2961,    80
*Nset, nset=Set-4, generate
   81,  3159,    81
*Elset, elset=Set-4, generate
   80,  3040,    80
*Nset, nset=Set-5, generate
 74,  81,   1
*Elset, elset=Set-5, generate
 74,  80,   1
*Distribution, name=Ori-1-DiscOrient, location=ELEMENT, Table=Ori-1-DiscOrient_Table
** Description: Distribution generated from Discrete Orientation
,           1.,           0.,           0.,           0.,           1.,           0.
1,           0.,          -1.,           0.,           1.,           0.,           0.
2,           0.,          -1.,           0.,           1.,           0.,           0.
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3040,           0.,          -1.,           0.,           1.,           0.,           0.
*Orientation, name=Ori-1, system=RECTANGULAR
Ori-1-DiscOrient
3, 0.
** Section: Section-1
*Solid Section, elset=Set-2, orientation=Ori-1, controls=EC-1, material=Material-1
0.8,
*End Instance
**
*Nset, nset=Set-40, instance=Part-1-1, generate
   81,  3159,    81
*Elset, elset=Set-40, instance=Part-1-1, generate
   80,  3040,    80
*Nset, nset=Set-41, instance=Part-1-1, generate
    1,  3079,    81
*Elset, elset=Set-41, instance=Part-1-1, generate
    1,  2961,    80
*End Assembly
*Distribution Table, name=Ori-1-DiscOrient_Table
coord3D, coord3D
**
** ELEMENT CONTROLS
**
*Section Controls, name=EC-1, hourglass=ENHANCED
1., 1., 1.
**
** MATERIALS
**
*Material, name=Material-1
*Depvar
      4,
*User Material, constants=19
0.,      0., <E1>,     <E2>,     -2.,   <V1>,   <V2>,   <V3>
   <V4>,    <V5>,   <V6>,   <V7>,   <V8>,      6.,      2., <V9>
 <V10>,   <V11>,      0.
*User Output Variables
      3,
*Time Points, name=TimePoints-1
0., 0.00678883, 0.0135797, 0.0203911, 0.0271963, 0.0339955, 0.0407898, 0.0475994
0.0543988, 0.0612065, 0.0680093, 0.0748103, 0.0816065, 0.0884098, 0.0952162, 0.102022
0.108822, 0.115635, 0.122424, 0.129227, 0.13604, 0.142842, 0.149642, 0.156448
0.163252, 0.170048, 0.176847, 0.183658, 0.190459, 0.197266, 0.204069, 0.210868
0.217667, 0.22447, 0.231282, 0.238081, 0.244882, 0.251689, 0.258489, 0.265291
0.272089, 0.278902, 0.285702, 0.292501, 0.29931, 0.306113, 0.312913, 0.319708
0.326519, 0.333325, 0.34013, 0.346928, 0.35373, 0.360535, 0.367333, 0.374139
0.380945, 0.387743, 0.394549, 0.401352, 0.408156, 0.414957, 0.421756, 0.42856
0.435357, 0.442169, 0.44897, 0.455776, 0.462573, 0.46938, 0.476184, 0.482987
0.489786, 0.496594, 0.503391, 0.510186, 0.517003, 0.523803, 0.530603, 0.537405
0.544204, 0.551016, 0.55781, 0.564612, 0.571418, 0.578226, 0.58503, 0.591831
0.598629, 0.605437, 0.612242, 0.619043, 0.625846, 0.632651, 0.639445, 0.646256
0.653059, 0.659851, 0.666661, 0.673466, 0.680261, 0.68707, 0.693872, 0.700674
0.707479, 0.714277, 0.721083, 0.727888, 0.734687, 0.741495, 0.748295, 0.755115
0.761935, 0.768705, 0.775506, 0.782307, 0.789107, 0.795915, 0.802717, 0.809515
0.816331, 0.823126, 0.829935, 0.836729, 0.843535, 0.850332, 0.857142, 0.863942
0.870749, 0.877555, 0.884349, 0.891154, 0.897958, 0.904757, 0.911569, 0.918373
0.92517, 0.931971, 0.938774, 0.94558, 0.952384, 0.959182, 0.965988, 0.972793
0.979597, 0.986397, 0.993203
** ----------------------------------------------------------------
**
** STEP: Step-1
**
*Step, name=Step-1, nlgeom=YES, inc=10000
*Static
0.1, 1., 1e-10, 1.
**
** BOUNDARY CONDITIONS
**
** Name: BC-DISPL Type: Displacement/Rotation
*Boundary
Set-40, 1, 1
Set-40, 2, 2, -8.5749
Set-40, 6, 6
** Name: BC-ENCASTRE Type: Displacement/Rotation
*Boundary
Set-41, 1, 1
Set-41, 2, 2
Set-41, 6, 6
**
** OUTPUT REQUESTS
**
*Restart, write, frequency=0
**
** FIELD OUTPUT: F-Output-1
**
*Output, field, time points=TimePoints-1
*Node Output
RF, U
*End Step
